// SBML level 3 version 2
// Created with https://github.com/matthiaskoenig/sbmlutils.

model aliskiren_intestine(PODOSE_ali, Ka_dis_ali, Mr_ali, Vext, Vgu, Vlumen, Vfeces, Vstomach, ali_lumen, ali_entero, alm_entero, ali_ext, ali_feces)
  // Model for aliskiren absorption in the small intestine
  // Model for aliskiren absorption
  // large amount of radioactivity in feces: ~90.5% (mainly aliskiren unchanged 77.5%), but with delay starting after ~24 hr [Waldmeister2007] --> probably strong enterohepatic circulation
  // absorption ~5% [Tsukimoto2015]
  // variable absorption rate/transit time (interindividual differences); often slow up to 4 hours e.g.[Waldmeister2007]
  // => absorption aliskiren; very low absorption; fraction absorbed ~5% (95% of oral dose go in feces)
  // Terms of use
  // The content of this model has been carefully created in a manual research effort. This file has been created by Matthias König using sbmlutils. For questions contact koenigmx@hu-berlin.de. Copyright © 2024 Matthias König.
  // This work is licensed under a Creative Commons Attribution 4.0 International License.
  // Redistribution and use of any part of this model, with or without modification, are permitted provided that the following conditions are met:
  // Redistributions of this SBML file must retain the above copyright notice, this list of conditions and the following disclaimer.
  // Redistributions in a different form must reproduce the above copyright notice, this list of conditions and the following disclaimer in the documentation and/or other materials provided with the distribution.
  // This model is distributed in the hope that it will be useful, but WITHOUT ANY WARRANTY; without even the implied warranty of MERCHANTABILITY or FITNESS FOR A PARTICULAR PURPOSE.
  // model units - substance: mmole, time: min, volume: litre, area: m2, length: metre, extent: mmole

  // Compartments:
  compartment Vext = 1 litre; Vext is "plasma";  // SBO:0000290 ncit:C13356 BTO:0000131
  compartment Vgu = 1.2825 litre; Vgu is "intestine";  // SBO:0000290 FMA:45615 BTO:0000545 ncit:C12736
  compartment Vlumen = 1.15425 litre; Vlumen is "intestinal lumen (inner part of intestine)";  // SBO:0000290 FMA:14586 UBERON:0018543
  compartment Vfeces = 1 litre;  // SBO:0000290 FMA:64183 ncit:C13234 BTO:0000440
  compartment Ventero = 0.12825 litre; Ventero is "intestinal lining (enterocytes)";  // SBO:0000290
  compartment Vapical = NaN; Vapical has m2; Vapical is "apical membrane (intestinal membrane enterocytes)";  // 2-D; SBO:0000290 FMA:84666 GO:0016324
  compartment Vbaso = NaN; Vbaso has m2; Vbaso is "basolateral membrane (intestinal membrane enterocytes)";  // 2-D; SBO:0000290 FMA:84669 GO:0016323
  compartment Vstomach = 1 litre;  // SBO:0000290 FMA:7148 ncit:C12391 UBERON:0000945

  // Species:
  substanceOnly species $ali_stomach in Vstomach = 0; ali_stomach is "aliskiren (stomach)";  // SBO:0000247 CHEBI:601027 snomed:426725002 ncit:C65222
  species ali_lumen in Vlumen = 0; ali_lumen is "aliskiren (intestinal volume)";  // SBO:0000247 CHEBI:601027 snomed:426725002 ncit:C65222
  species ali_entero in Ventero = 0; ali_entero is "aliskiren (enterocytes)";  // SBO:0000247 CHEBI:601027 snomed:426725002 ncit:C65222
  substanceOnly species alm_entero in Ventero = 0; alm_entero is "aliskiren metabolite (enterocytes)";  // SBO:0000247
  species ali_ext in Vext = 0; ali_ext is "aliskiren (plasma)";  // SBO:0000247 CHEBI:601027 snomed:426725002 ncit:C65222
  substanceOnly species ali_feces in Vfeces = 0; ali_feces is "aliskiren (feces)";  // SBO:0000247 CHEBI:601027 snomed:426725002 ncit:C65222

  // Parameters:
  // Fraction absorbed, i.e., only a fraction of the aliskiren in the intestinal lumen is absorbed. This parameter determines how much of the aliskiren is excreted.
  // F_ali_abs of dose is absorbed. (1-F_ali_abs) is excreted in feces.
  // large amount of radioactivity in feces: ~90.5% (mainly aliskiren unchanged 77.5%), but with delay starting after ~24 hr [Waldmeister2007] --> probably strong enterohepatic circulation
  // absorption ~5% [Tsukimoto2015]
  // variable absorption rate/transit time (interindividual differences); often slow up to 4 hours e.g.[Waldmeister2007]
  // => absorption aliskiren; very low absorption; fraction absorbed ~5% (95% of oral dose go in feces)
  F_ali_abs = 0.05 dimensionless; F_ali_abs is "fraction absorbed aliskiren";  // SBO:0000002
  ALIABS_k = 0.1 per_min; ALIABS_k is "rate of aliskiren absorption";  // SBO:0000009
  // Used for drug-drug interactions. f_oatp = 1: normal activity; f_oatp < 1: reduced activity; inhibitor of absorption f_oatp > 1: increased activity; activator of absorption
  f_oatp = 1 dimensionless; f_oatp is "OATP transporter activity";  // SBO:0000009
  PODOSE_ali = 0 mg; PODOSE_ali is "oral dose aliskiren [mg]";  // SBO:0000002
  Ka_dis_ali = 2 per_hr; Ka_dis_ali is "Ka_dis [1/hr] dissolution aliskiren";  // SBO:0000002
  Mr_ali = 551.7583 g_per_mole; Mr_ali is "Molecular weight aliskiren [g/mole]";  // SBO:0000647
  // Fraction metabolized.
  // F_ali_met dose is metabolized in enterocytes. (1-F_ali_met) is absorbed in plasma.
  F_ali_met = 0.5 dimensionless; F_ali_met is "fraction metabolised enterocytes aliskiren";  // SBO:0000002
  ALIMET_k = 0.1 per_min; ALIMET_k is "rate of aliskiren metabolism";  // SBO:0000009
  // Used for drug-drug interactions. f_cyp3a4 = 1: normal activity; f_cyp3a4 < 1: reduced activity; inhibitor of CYP3A4 f_cyp3a4 > 1: increased activity; activator of CYP3A4
  f_cyp3a4 = 1 dimensionless; f_cyp3a4 is "CYP3A4 activity";  // SBO:0000009
  absorption has mmole_per_min; absorption is "absorption aliskiren";
  metabolism has mmole_per_min; metabolism is "metabolism aliskiren enterocytes";

  // Assignment rules:
  absorption := ALIABS_k*Vgu*ali_lumen;
  // Catalyzed via CYP3A4.
  metabolism := ALIMET_k*Ventero*ali_entero;

  // Rate rules:
  PODOSE_ali' = -dissolution_ali*Mr_ali;

  // Reactions:
  ALIABS: ali_lumen => ali_entero; f_oatp*F_ali_abs*absorption; ALIABS is "absorption aliskiren (enterocytes)";  // SBO:0000655
  ALIEXC: ali_lumen => ali_feces; (1 - F_ali_abs)*absorption; ALIEXC is "excretion aliskiren (feces)";  // SBO:0000655
  // Swallowing, dissolution of tablet, and transport into intestine. Overall process describing the rates of this processes.
  dissolution_ali: $ali_stomach => ali_lumen; Ka_dis_ali/(60 min_per_hr)*PODOSE_ali/Mr_ali; dissolution_ali is "dissolution aliskiren";
  ALIMET: ali_entero => alm_entero; f_cyp3a4*F_ali_met*metabolism; ALIMET is "metabolism aliskiren (plasma)";  // SBO:0000655
  ALIABS2: ali_entero => ali_ext; (1 - F_ali_met)*metabolism; ALIABS2 is "absorption aliskiren (plasma)";  // SBO:0000655

  // Unit definitions:
  unit g_per_mole = gram / mole; g_per_mole is "g/mole";
  unit l_per_min = litre / (60 second); l_per_min is "l/min";
  unit m2 = metre^2; m2 is "meter^2";
  unit mM = 1e-3 mole / litre; mM is "mmole/liter";
  unit mg = 1e-3 gram;
  unit mg_per_min = 1e-3 gram / (60 second); mg_per_min is "mg/min";
  unit mg_per_s_l = 1e-3 gram / (second * litre); mg_per_s_l is "mg/s/l";
  unit min = 60 second;
  unit min_per_hr = 60 second / (3600 second); min_per_hr is "min/hour";
  unit mmole = 1e-3 mole;
  unit mmole_per_min = 1e-3 mole / (60 second); mmole_per_min is "mmole/min";
  unit mmole_per_min_l = 1e-3 mole / (60 second * litre); mmole_per_min_l is "mmole/min/l";
  unit per_hr = 1 / (3600 second); per_hr is "1/hr";
  unit per_min = 1 / (60 second); per_min is "1/min";
  unit per_mmole = 1 / (1e-3 mole); per_mmole is "1/mmole";
end
