// SBML level 3 version 2
// Created with https://github.com/matthiaskoenig/sbmlutils.

model aliskiren_liver(Vext, Vli, Vbi, Vlumen, ali_ext, ali_lumen)
  // Model for hepatic aliskiren metabolism.
  // Model for aliskiren metabolism.
  // Terms of use
  // The content of this model has been carefully created in a manual research effort. This file has been created by Matthias König using sbmlutils. For questions contact koenigmx@hu-berlin.de. Copyright © 2024 Matthias König.
  // This work is licensed under a Creative Commons Attribution 4.0 International License.
  // Redistribution and use of any part of this model, with or without modification, are permitted provided that the following conditions are met:
  // Redistributions of this SBML file must retain the above copyright notice, this list of conditions and the following disclaimer.
  // Redistributions in a different form must reproduce the above copyright notice, this list of conditions and the following disclaimer in the documentation and/or other materials provided with the distribution.
  // This model is distributed in the hope that it will be useful, but WITHOUT ANY WARRANTY; without even the implied warranty of MERCHANTABILITY or FITNESS FOR A PARTICULAR PURPOSE.
  // model units - substance: mmole, time: min, volume: litre, area: m2, length: metre, extent: mmole

  // Compartments:
  compartment Vext = 1.5 litre; Vext is "plasma";  // SBO:0000290 ncit:C13356 BTO:0000131
  compartment Vli = 1.5 litre; Vli is "liver";  // SBO:0000290 FMA:7197 BTO:0000759 ncit:C12392
  compartment Vmem = NaN; Vmem has m2; Vmem is "plasma membrane";  // 2-D; SBO:0000290 ncit:C13735 FMA:63841 GO:0005886
  compartment Vapical = NaN; Vapical has m2; Vapical is "apical membrane";  // 2-D; SBO:0000290 FMA:84666 GO:0016324
  compartment Vbi = 1 litre; Vbi is "bile";  // SBO:0000290 FMA:62971 ncit:C13192
  compartment Vlumen = 1.15425 litre; Vlumen is "intestinal lumen (inner part of intestine)";  // SBO:0000290 FMA:14586 UBERON:0018543

  // Species:
  species ali_ext in Vext = 0; ali_ext is "aliskiren (plasma)";  // SBO:0000247 CHEBI:601027 snomed:426725002 ncit:C65222
  species ali in Vli = 0; ali is "aliskiren (liver)";  // SBO:0000247 CHEBI:601027 snomed:426725002 ncit:C65222
  species alm in Vli = 0; alm is "aliskiren metabolite (liver)";  // SBO:0000247
  // Bile aliskiren in amount.
  substanceOnly species ali_bi in Vbi = 0; ali_bi is "aliskiren (bile)";  // SBO:0000247 CHEBI:601027 snomed:426725002 ncit:C65222
  species ali_lumen in Vlumen = 0; ali_lumen is "aliskiren (lumen)";  // SBO:0000247 CHEBI:601027 snomed:426725002 ncit:C65222

  // Parameters:
  ALIEX_k = 0.0001 per_min; ALIEX_k is "rate for aliskiren export in bile";  // SBO:0000009
  ALIIM_Vmax = 100 mmole_per_min_l; ALIIM_Vmax is "Vmax aliskiren import";  // SBO:0000186
  ALIIM_Km_ali = 0.1 mM; ALIIM_Km_ali is "Km aliskiren import";  // SBO:0000027
  ALM_Vmax = 1 mmole_per_min_l; ALM_Vmax is "Vmax aliskiren metabolism";  // SBO:0000186
  ALM_Km_ali = 0.1 mM; ALM_Km_ali is "Km aliskiren metabolism";  // SBO:0000027
  // Scaling factor to vary CYP3A4 activity. 1.0: unchanged activity; < 1.0 decreased activity; >1.0 increased activity.
  f_cyp3a4 = 1 dimensionless; f_cyp3a4 is "scaling factor cyp3a4 activity";  // SBO:0000002

  // Reactions:
  ALIIM: ali_ext -> ali; ALIIM_Vmax/ALIIM_Km_ali*Vli*(ali_ext - ali)/(1 + ali_ext/ALIIM_Km_ali + ali/ALIIM_Km_ali); ALIIM is "aliskiren import (ALIIM)";  // SBO:0000655
  ALM: ali => alm; f_cyp3a4*ALM_Vmax*Vli*ali/(ali + ALM_Km_ali); ALM is "aliskiren metabolism via CYP3A4";  // SBO:0000176
  ALIEX: ali => ali_bi; ALIEX_k*Vli*ali; ALIEX is "aliskiren bile export";  // SBO:0000655
  ALIEHC: ali_bi => ali_lumen; ALIEX; ALIEHC is "aliskiren enterohepatic circulation";  // SBO:0000655

  // Unit definitions:
  unit g_per_mole = gram / mole; g_per_mole is "g/mole";
  unit l_per_min = litre / (60 second); l_per_min is "l/min";
  unit m2 = metre^2; m2 is "meter^2";
  unit mM = 1e-3 mole / litre; mM is "mmole/liter";
  unit mg = 1e-3 gram;
  unit mg_per_s_l = 1e-3 gram / (second * litre); mg_per_s_l is "mg/s/l";
  unit min = 60 second;
  unit min_per_hr = 60 second / (3600 second); min_per_hr is "min/hour";
  unit mmole = 1e-3 mole;
  unit mmole_per_min = 1e-3 mole / (60 second); mmole_per_min is "mmole/min";
  unit mmole_per_min_l = 1e-3 mole / (60 second * litre); mmole_per_min_l is "mmole/min/l";
  unit per_min = 1 / (60 second); per_min is "1/min";
  unit per_mmole = 1 / (1e-3 mole); per_mmole is "1/mmole";
end
